*Heading
** Job name: eckegrob Model name: Model-1
** Generated by: Abaqus/CAE 6.12-3
*Preprint, echo=NO, model=NO, history=NO, contact=NO
*Node, NSET=ALL
      1,           1.,           1.,           1.
      2,           1.,           0.,           1.
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**
** UEL elements (material included in implementation) **
**
*USER ELEMENT,NODES=4,TYPE=U1003,PROPERTIES=1,COORDINATES=3,VARIABLES=1
1,2,3,11,12,13,14,15,16,17,18,19
*ELEMENT,TYPE=U1003,ELSET=UELS
    1,  2758,  2759,  2760,  2761
    2,  2758,  2762,  2763,  2764
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*UEL PROPERTY,ELSET=UELS
1
*Nset, nset=Set-5
    2,    3,    5,    6,   28,   29
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*Nset, nset=Set-6
    1,    4,    7,    8,   66,   67
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*Nset, nset=Set-7
1073
** ----------------------------------------------------------------
**
** STEP: Step-1
**
*Step, name=Step-1, nlgeom=YES
*Static
1., 1., 1e-05, 1.
*Controls, ANALYSIS=DISCONTINUOUS
**
** BOUNDARY CONDITIONS
**
** Name: BC-2 Type: Displacement/Rotation
*Boundary
Set-6, 1, 1
Set-6, 2, 2
Set-6, 3, 3
**Set-6, 11, 11
**Set-6, 12, 12
**Set-6, 13, 13
**Set-6, 14, 14
**Set-6, 15, 15
**Set-6, 16, 16
**Set-6, 17, 17
**Set-6, 18, 18
**Set-6, 19, 19
*Boundary
Set-7, 2,2, 0.10
**
** OUTPUT REQUESTS
**
*Restart, write, frequency=0
**
** FIELD OUTPUT: F-Output-1
**
*Output, field, frequency=1
*Node Output
U, RF, NT
**
** HISTORY OUTPUT: H-Output-1
**
*Output, history, variable=PRESELECT
*End Step
